# LAMMPS input file for Silicon Carbide with Tersoff potential
# Description: Creates cubic box of SiC, minimizes, then runs NVE and NVT with temperature ramp

# Initialize simulation
log		SiC.log
units 		metal
dimension	3
boundary	p p p
atom_style	atomic

#neighbor        3.0 bin
#neigh_modify every 1 delay 0 check no

# Create simulation box and lattice: 3C-SiC as two shifted fcc
variable        N equal 20
lattice 	fcc 4.36 origin 0 0 0
region		box block 0 ${N} 0 ${N} 0 ${N}
create_box	2 box
create_atoms 	1 box
lattice 	fcc 4.36 origin 0.25 0.25 0.25
create_atoms	2 box


# Define masses
mass            1 28.0855  # Silicon
mass            2 12.0107  # Carbon

# Define Tersoff potential
pair_style      tersoff
pair_coeff      * * SiC_1989.tersoff Si C

# Output settings
thermo          10
thermo_style    custom step temp pe ke etotal press lx ly lz vol
compute         peat all pe/atom

region          reg_Si block 0 0.1 0 0.1 0 0.1 units lattice
group		Si_atom region reg_Si
region          reg_C block 0.2 0.3 0.2 0.3 0.2 0.3 units lattice
group		C_atom region reg_C
compute 	Si Si_atom reduce ave x y z vx vy vz c_peat
compute 	C C_atom reduce ave x y z vx vy vz c_peat


# Energy minimization
fix             1 all box/relax x 0.0 y 0.0 z 0.0 couple none
minimize        1e-10 1.0e-12 50000 100000
unfix           1
reset_timestep  0

# Set timestep
timestep        0.001  # 1 fs

variable	T equal 1550
# Create velocities
velocity        all create $(v_T) 482748 dist gaussian

# NVE ensemble
fix             1 all nve
run             1000
unfix           1

# NVT ensemble with temperature ramp
fix             2 all nvt temp $(v_T/2.0) $(v_T) $(100.0*dt)
run             5000
unfix           2

dump            mydump all custom 25 SiC_$TK.dump id type x y z vx vy vz c_peat
fix 		extra all print 1 "$(c_Si[1]:%4.3f)	$(c_Si[2]:%4.3f)	$(c_Si[3]:%4.3f)	$(c_Si[4]:%4.3f)	$(c_Si[5]:%4.3f)	$(c_Si[6]:%4.3f)	$(c_Si[7]:%4.4f)	$(c_C[1]:%4.3f)       $(c_C[2]:%4.3f)      $(c_C[3]:%4.3f)      $(c_C[4]:%4.3f)      $(c_C[5]:%4.3f)      $(c_C[6]:%4.3f)      $(c_C[7]:%4.4f)	$(temp)  $(etotal)" append SiC_pair_$TK.dat screen no title "# pair"

fix             3 all nvt temp $(v_T) $(v_T) $(100.0*dt)
run             500

# Final output
write_data      SiC_final.data
